Simulations: Version=180
  Simulation ClayFallow
    Clock: Start=2022-07-19; End=2023-11-09
    Summary
    Weather: FileName=2022-07-19_2023-11-09_-75.5833,37.7448.met
    SoilArbitrator
    MicroClimate: a_interception=0; b_interception=1; c_interception=0; d_interception=0; SoilHeatFluxFraction=0.4; MinimumHeightDiffForNewLayer=0; NightInterceptionFraction=0.5; ReferenceHeight=2
    Zone TemplateField: Area=1; Slope=0; AspectAngle=0; Altitude=50; X=0; Y=0
      Report: EventNames=[Clock].EndOfDay
        VariableNames:
          [Clock].Today
          [Weather].Rain
          sum([Soil].SoilWater.ESW)
          [Soil].Water.Volumetric
          sum([Soil].Water.Volumetric)
          [Soil].SoilWater.Es
          [Soil].SoilWater.Runoff
          [Soil].SoilWater.Drainage
          sum([Soil].NO3.kgha)
          sum([Soil].Nutrient.MineralisedN
          [SurfaceOrganicMatter].Wt
          [SurfaceOrganicMatter].Cover
      SurfaceOrganicMatter: InitialResidueName=wheat_stubble; InitialResidueType=wheat; InitialResidueMass=1000; InitialStandingFraction=0; InitialCPR=0; InitialCNR=100
      Soil Munden:118087: SoilType=Munden:118087; State=VA; Country=USA; ApsoilNumber=0; Latitude=37.7448; Longitude=-75.5833
        DataSource=SSURGO (https://sdmdataaccess.nrcs.usda.gov/) through R package soilDB, R package apsimx function ssurgo2sp. Timestamp 2024-09-17 15:35:53.083634
        Comments=cokey = 23828151 - acres percent = 90 - component percent = 90 - taxonomic classification name = Coarse-loamy, mixed, semiactive, thermic Aquic Hapludults - drainage class = Moderately well drained - elevation = 15 - slope = 1 - geomdesc = NA
        Physical
          Thickness  ParticleSizeSand  ParticleSizeSilt  ParticleSizeClay  Rocks  BD       AirDry     LL15       DUL        SAT       KS
          200        66.6              23.4              10                0      1.62966  0.0289904  0.0579808  0.141017   0.384035  2419.2
          200        66.6              23.4              10                0      1.62966  0.0289904  0.0579808  0.141017   0.384035  2419.2
          200        66.6              23.4              10                0      1.62966  0.0289904  0.0579808  0.141017   0.384035  2419.2
          200        67.4              19.6              13                0      1.63221  0.0759596  0.0759596  0.155706   0.383071  1987.2
          200        67.4              19.6              13                0      1.63221  0.0759596  0.0759596  0.155706   0.383071  1987.2
          200        67.4              19.6              13                0      1.63221  0.0759596  0.0759596  0.155706   0.383071  1987.2
          200        67.4              19.6              13                0      1.63221  0.0759596  0.0759596  0.155706   0.383071  1987.2
          200        67.4              19.6              13                0      1.63221  0.0759596  0.0759596  0.155706   0.383071  1987.2
          200        85                8                 7                 0      1.59193  0.0355908  0.0355908  0.0844629  0.398273  6739.2
          200        85                8                 7                 0      1.59193  0.0355908  0.0355908  0.0844629  0.398273  6739.2
          Rocks source: Calculated
          SoilCrop MaizeSoil
            LL=[0.0579808, 0.0579808, 0.0579808, 0.0759596, 0.0759596, 0.0759596, 0.0759596, 0.0759596, 0.0355908, 0.0355908]
            KL=[0.06, 0.0491238, 0.0402192, 0.0329287, 0.0269597, 0.0220728, 0.0180717, 0.0147958, 0.0121138, 0.00991793]
            XF=[1, 1, 1, 1, 1, 1, 1, 1, 1, 1]
          SoilCrop SoybeanSoil: same as ClayFallow.TemplateField.Munden:118087.Physical.MaizeSoil
          SoilCrop WheatSoil: same as ClayFallow.TemplateField.Munden:118087.Physical.MaizeSoil
        WaterBalance SoilWater: SummerDate=1-Nov; SummerU=6; SummerCona=3.5; WinterDate=1-Apr; WinterU=4; WinterCona=2.5; DiffusConst=40; DiffusSlope=16; Salb=0.12; CN2Bare=73; CNRed=20; CNCov=0.8; PSIDul=-100; Thickness=[150, 150, 300, 300, 300, 300, 300, 300, 300, 300]; SWCON=[0.3, 0.3, 0.3, 0.3, 0.3, 0.3, 0.3, 0.3, 0.3, 0.3]
        Water: Thickness=[150, 150, 300, 300, 300, 300, 300, 300, 300, 300]; InitialPAWmm=392.134; RelativeTo=LL15; FilledFromTop=true
          InitialValues=[0.38, 0.22, 0.28, 0.28, 0.28, 0.28, 0.28, 0.28, 0.28, 0.28]
        Organic: FOMCNRatio=40; CarbonUnits=Total
          Thickness  Carbon    SoilCNRatio  FBiom       FInert    FOM
          200        0.872093  12           0.04        0.8       150
          200        0.872093  12           0.0327492   0.80804   122.81
          200        0.872093  12           0.0268128   0.816161  100.548
          200        0.436047  12           0.0219525   0.824364  82.3217
          200        0.436047  12           0.0179732   0.832649  67.3993
          200        0.436047  12           0.0147152   0.841017  55.1819
          200        0.436047  12           0.0120478   0.849469  45.1791
          200        0.436047  12           0.00986388  0.858007  36.9895
          200        0.145349  12           0.00807586  0.86663   30.2845
          200        0.145349  12           0.00661196  0.875339  24.7948
        Chemical: Thickness=[200, 200, 200, 200, 200, 200, 200, 200, 200, 200]; PH=[6.5, 6.5, 6.5, 6.5, 6.5, 6.5, 6.5, 6.5, 6.5, 6.5]; PHUnits=Water
        CERESSoilTemperature Temperature
        Nutrient
        Solute NO3: Thickness=[200, 200, 200, 200, 200, 200, 200, 200, 200, 200]; InitialValuesUnits=kg/ha; WaterTableConcentration=0; D0=0; DepthConstant=0; MaxDepthSoluteAccessible=0; RunoffEffectivenessAtMovingSolute=0; MaxEffectiveRunoff=0
          InitialValues=[0.5, 0.495025, 0.490099, 0.485223, 0.480395, 0.475615, 0.470882, 0.466197, 0.461558, 0.456966]
        Solute NH4: Thickness=[200, 200, 200, 200, 200, 200, 200, 200, 200, 200]; InitialValuesUnits=kg/ha; WaterTableConcentration=0; D0=0; DepthConstant=0; MaxDepthSoluteAccessible=0; RunoffEffectivenessAtMovingSolute=0; MaxEffectiveRunoff=0
          InitialValues=[0.05, 0.0495025, 0.0490099, 0.0485223, 0.0480395, 0.0475615, 0.0470882, 0.0466197, 0.0461558, 0.0456966]
        Solute Urea: Thickness=[2000]; InitialValues=[0]; InitialValuesUnits=ppm; WaterTableConcentration=0; D0=0; DepthConstant=0; MaxDepthSoluteAccessible=0; RunoffEffectivenessAtMovingSolute=0; MaxEffectiveRunoff=0
      Irrigation
  DataStore Graph
